# Selection | Insertion | Merge
# Ram - mbytes | Ram - mbytes
# Ram - mbytes
x[5] := [30000; 35000; 40000; 45000; 50000]
y[5] := [19; 5; 24; 10; 28]
x[3] := [30000; 35000; 40000; 45000; 50000]
y[3] := [11; 23; 2; 14; 25]
x[1] := [30000; 35000; 40000; 45000; 50000]
y[1] := [8; 14; 19; 26; 31]
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# Time - mseconds
# Time - mseconds | Time - mseconds
x[4] := [30000; 35000; 40000; 45000; 50000]
y[4] := [36.169; 47.689; 66.843; 82.422; 198.886]
x[6] := [30000; 35000; 40000; 45000; 50000]
y[6] := [0.307; 0.277; 0.293; 0.346; 0.444]
x[2] := [30000; 35000; 40000; 45000; 50000]
y[2] := [33.371; 43.813; 61.792; 74.576; 98.994]
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# Quick | Shell
# Ram - mbytes | Ram - mbytes
x[7] := [30000; 35000; 40000; 45000; 50000]
y[7] := [22; 14; 6; 31; 24]
x[9] := [30000; 35000; 40000; 45000; 50000]
y[9] := [24; 22; 21; 20; 20]
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# Time - mseconds | Time - mseconds
x[8] := [30000; 35000; 40000; 45000; 50000]
y[8] := [0.252; 0.272; 0.291; 0.399; 0.451]
x[10] := [30000; 35000; 40000; 45000; 50000]
y[10] := [0.333; 0.381; 0.424; 0.485; 0.653]
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